*Heading
** Job name: Job-2 Model name: Model-2
** Generated by: Abaqus/CAE 6.14-1
*Preprint, echo=NO, model=NO, history=NO, contact=NO
**
** PARTS
**
*Part, name=Part-Cable50
*Node
      1,          50.,           0.,           0.
      2,           0.,         150.,           0.
*Element, type=T3D2
1, 1, 2
*Nset, nset=_PickedSet2, internal
 1, 2
*Elset, elset=_PickedSet2, internal
 1,
** Section: Section-Cable
*Solid Section, elset=_PickedSet2, material=Steel
0.25,
*End Part
**
*Part, name=Part-Cable100
*Node
      1,         100.,           0.,           0.
      2,           0.,         150.,           0.
*Element, type=T3D2
1, 1, 2
*Nset, nset=_PickedSet2, internal
 1, 2
*Elset, elset=_PickedSet2, internal
 1,
** Section: Section-Cable
*Solid Section, elset=_PickedSet2, material=Steel
0.25,
*End Part
**
*Part, name=Part-Cable150
*Node
      1,         150.,           0.,           0.
      2,           0.,         150.,           0.
*Element, type=T3D2
1, 1, 2
*Nset, nset=_PickedSet2, internal
 1, 2
*Elset, elset=_PickedSet2, internal
 1,
** Section: Section-Cable
*Solid Section, elset=_PickedSet2, material=Steel
0.25,
*End Part
**
*Part, name=Part-Cable200
*Node
      1,         200.,           0.,           0.
      2,           0.,         150.,           0.
*Element, type=T3D2
1, 1, 2
*Nset, nset=_PickedSet2, internal
 1, 2
*Elset, elset=_PickedSet2, internal
 1,
** Section: Section-Cable
*Solid Section, elset=_PickedSet2, material=Steel
0.25,
*End Part
**
*Part, name=Part-Cable250
*Node
      1,         250.,           0.,           0.
      2,           0.,         150.,           0.
*Element, type=T3D2
1, 1, 2
*Nset, nset=_PickedSet2, internal
 1, 2
*Elset, elset=_PickedSet2, internal
 1,
** Section: Section-Cable
*Solid Section, elset=_PickedSet2, material=Steel
0.25,
*End Part
**
*Part, name=Part-Floor
*Node
      1,         200.,         -10.,           0.
      2,         200.,          10.,           0.
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*Element, type=S4R
  1,   1,  23, 602,  88
  2,  23,  24, 603, 602
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*Nset, nset=_PickedSet20, internal, generate
    1,  2761,     1
*Elset, elset=_PickedSet20, internal, generate
    1,  2500,     1
** Section: Section-Floor
*Shell Section, elset=_PickedSet20, material=Concrete
1., 5
*End Part
**
*Part, name=Part-Pier
*Node
      1,           0.,      -133.75,           0.
      2,           0.,      -133.75,          10.
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*Element, type=C3D8R
   1,  250, 1915, 4339,  727,    1,   13,  679,   32
   2, 1915, 1916, 4340, 4339,   13,   14,  680,  679
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*Nset, nset=_PickedSet4, internal, generate
    1,  9090,     1
*Elset, elset=_PickedSet4, internal, generate
    1,  7000,     1
** Section: Section-Pier
*Solid Section, elset=_PickedSet4, material=Concrete
,
*End Part
**
*Part, name=Part-RiverBank
*Node
      1,           0.,          10.,          20.
      2,           0.,         -10.,          20.
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*Element, type=C3D8R
   1,  152, 1227, 2469,  555,    1,   13,  303,   58
   2, 1227, 1228, 2470, 2469,   13,   14,  304,  303
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*Nset, nset=_PickedSet2, internal, generate
    1,  7436,     1
*Elset, elset=_PickedSet2, internal, generate
    1,  6250,     1
** Section: Section-RiverBank
*Solid Section, elset=_PickedSet2, material=Granite
,
*End Part
**
*Part, name=Part-SupportBeam
*Node
      1,        -200.,           0.,           0.
      2,        -250.,           0.,           0.
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*Element, type=B31
 1,  1, 21
 2, 21, 22
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*Nset, nset=_PickedSet2, internal, generate
   1,  666,    1
*Elset, elset=_PickedSet2, internal, generate
   1,  675,    1
** Section: Section-SupportBeam  Profile: Profile-SupportBeam
*Beam Section, elset=_PickedSet2, material=Aluminum, temperature=GRADIENTS, section=BOX
2., 2., 0.1, 0.1, 0.1, 0.1
0.,0.,-1.
*End Part
**
**
** ASSEMBLY
**
*Assembly, name=Assembly
**
*Instance, name=Part-Floor-1, part=Part-Floor
*End Instance
**
*Instance, name=Part-Pier-2, part=Part-Pier
          0.,         -10.,        83.75
          0.,         -10.,        83.75,           1.,         -10.,        83.75,          90.
*End Instance
**
*Instance, name=Part-Pier-1, part=Part-Pier
          0.,          20.,        83.75
          0.,          20.,        83.75,           1.,          20.,        83.75,          90.
*End Instance
**
*Instance, name=Part-RiverBank-1, part=Part-RiverBank
       -300.,           0.,         -50.
*End Instance
**
*Instance, name=Part-RiverBank-2, part=Part-RiverBank
        250.,           0.,         -50.
*End Instance
**
*Instance, name=Part-SupportBeam-1, part=Part-SupportBeam
          0.,         -10.,         -30.
          0.,         -10.,         -30.,           1.,         -10.,         -30.,          90.
*End Instance
**
*Instance, name=Part-SupportBeam-2, part=Part-SupportBeam
          0.,          10.,         -30.
          0.,          10.,         -30.,           1.,          10.,         -30.,          90.
*End Instance
**
*Instance, name=Part-Cable50-1, part=Part-Cable50
          0.,         -10.,           0.
          0.,         -10.,           0.,  4.32978055978831e-17, -9.29289318876822, 0.707106811231781,         180.
*End Instance
**
*Instance, name=Part-Cable100-1, part=Part-Cable100
          0.,         -10.,           0.
          0.,         -10.,           0.,  4.32978055978831e-17, -9.29289318876822, 0.707106811231781,         180.
*End Instance
**
*Instance, name=Part-Cable150-1, part=Part-Cable150
          0.,         -10.,           0.
          0.,         -10.,           0.,  4.32978055978831e-17, -9.29289318876822, 0.707106811231781,         180.
*End Instance
**
*Instance, name=Part-Cable200-1, part=Part-Cable200
          0.,         -10.,           0.
          0.,         -10.,           0.,  4.32978055978831e-17, -9.29289318876822, 0.707106811231781,         180.
*End Instance
**
*Instance, name=Part-Cable250-1, part=Part-Cable250
          0.,         -10.,           0.
          0.,         -10.,           0.,  4.32978055978831e-17, -9.29289318876822, 0.707106811231781,         180.
*End Instance
**
*Instance, name=Part-Cable50-2, part=Part-Cable50
          0.,          10.,           0.
          0.,          10.,           0.,  4.32978055978831e-17, 10.7071068112318, 0.707106811231781,         180.
*End Instance
**
*Instance, name=Part-Cable100-2, part=Part-Cable100
          0.,          10.,           0.
          0.,          10.,           0.,  4.32978055978831e-17, 10.7071068112318, 0.707106811231781,         180.
*End Instance
**
*Instance, name=Part-Cable150-2, part=Part-Cable150
          0.,          10.,           0.
          0.,          10.,           0.,  4.32978055978831e-17, 10.7071068112318, 0.707106811231781,         180.
*End Instance
**
*Instance, name=Part-Cable200-2, part=Part-Cable200
          0.,          10.,           0.
          0.,          10.,           0.,  4.32978055978831e-17, 10.7071068112318, 0.707106811231781,         180.
*End Instance
**
*Instance, name=Part-Cable250-2, part=Part-Cable250
          0.,          10.,           0.
          0.,          10.,           0.,  4.32978055978831e-17, 10.7071068112318, 0.707106811231781,         180.
*End Instance
**
*Instance, name=Part-Cable50-3, part=Part-Cable50
          0.,         -10.,           0.
          0.,         -10.,           0.,           1.,         -10.,           0.,          90.
*End Instance
**
*Instance, name=Part-Cable100-3, part=Part-Cable100
          0.,         -10.,           0.
          0.,         -10.,           0.,           1.,         -10.,           0.,          90.
*End Instance
**
*Instance, name=Part-Cable150-3, part=Part-Cable150
          0.,         -10.,           0.
          0.,         -10.,           0.,           1.,         -10.,           0.,          90.
*End Instance
**
*Instance, name=Part-Cable200-3, part=Part-Cable200
          0.,         -10.,           0.
          0.,         -10.,           0.,           1.,         -10.,           0.,          90.
*End Instance
**
*Instance, name=Part-Cable250-3, part=Part-Cable250
          0.,         -10.,           0.
          0.,         -10.,           0.,           1.,         -10.,           0.,          90.
*End Instance
**
*Instance, name=Part-Cable50-4, part=Part-Cable50
          0.,          10.,           0.
          0.,          10.,           0.,           1.,          10.,           0.,          90.
*End Instance
**
*Instance, name=Part-Cable100-4, part=Part-Cable100
          0.,          10.,           0.
          0.,          10.,           0.,           1.,          10.,           0.,          90.
*End Instance
**
*Instance, name=Part-Cable150-4, part=Part-Cable150
          0.,          10.,           0.
          0.,          10.,           0.,           1.,          10.,           0.,          90.
*End Instance
**
*Instance, name=Part-Cable200-4, part=Part-Cable200
          0.,          10.,           0.
          0.,          10.,           0.,           1.,          10.,           0.,          90.
*End Instance
**
*Instance, name=Part-Cable250-4, part=Part-Cable250
          0.,          10.,           0.
          0.,          10.,           0.,           1.,          10.,           0.,          90.
*End Instance
**
*Nset, nset=Set-102, instance=Part-Pier-2
    1,    2,    3,    4,    9,   10
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*Nset, nset=Set-102, instance=Part-Pier-1
    1,    2,    3,    4,    9,   10
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*Nset, nset=Set-102, instance=Part-RiverBank-2
    9,   10,   11,   12,  210,  211
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*Nset, nset=Set-102, instance=Part-RiverBank-1
    9,   10,   11,   12,  210,  211
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*Elset, elset=Set-102, instance=Part-Pier-2
    1,    2,    3,    4,    5,    6
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*Elset, elset=Set-102, instance=Part-Pier-1
    1,    2,    3,    4,    5,    6
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*Elset, elset=Set-102, instance=Part-RiverBank-2
 3841, 3842, 3843, 3844, 3845, 3846
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*Elset, elset=Set-102, instance=Part-RiverBank-1
 3841, 3842, 3843, 3844, 3845, 3846
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*Nset, nset=Set-CablesGroup1, instance=Part-Cable50-1
 1, 2
*Nset, nset=Set-CablesGroup1, instance=Part-Cable100-1
 1, 2
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*Elset, elset=Set-CablesGroup1, instance=Part-Cable50-1
 1,
*Elset, elset=Set-CablesGroup1, instance=Part-Cable100-1
 1,
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*Nset, nset=m_Set-6, instance=Part-Floor-1
 2,
*Nset, nset=m_Set-8, instance=Part-Floor-1
 3,
*Nset, nset=m_Set-10, instance=Part-Floor-1
 5,
*Nset, nset=m_Set-12, instance=Part-Floor-1
 22,
*Nset, nset=m_Set-13, instance=Part-Floor-1
 7,
*Nset, nset=m_Set-14, instance=Part-Floor-1
 21,
*Nset, nset=m_Set-16, instance=Part-Floor-1
 1,
*Nset, nset=m_Set-18, instance=Part-Floor-1
 4,
*Nset, nset=m_Set-20, instance=Part-Floor-1
 6,
*Nset, nset=m_Set-22, instance=Part-Floor-1
 8,
*Nset, nset=m_Set-24, instance=Part-Floor-1
 19,
*Nset, nset=m_Set-26, instance=Part-Floor-1
 17,
*Nset, nset=m_Set-28, instance=Part-Floor-1
 15,
*Nset, nset=m_Set-30, instance=Part-Floor-1
 13,
*Nset, nset=m_Set-32, instance=Part-Floor-1
 11,
*Nset, nset=m_Set-34, instance=Part-Floor-1
 20,
*Nset, nset=m_Set-36, instance=Part-Floor-1
 18,
*Nset, nset=m_Set-38, instance=Part-Floor-1
 16,
*Nset, nset=m_Set-40, instance=Part-Floor-1
 14,
*Nset, nset=m_Set-42, instance=Part-Floor-1
 12,
*Nset, nset=m_Set-44, instance=Part-Floor-1
 22,
*Nset, nset=m_Set-46, instance=Part-Floor-1
 2,
*Nset, nset=m_Set-48, instance=Part-Floor-1
 3,
*Nset, nset=m_Set-50, instance=Part-Floor-1
 5,
*Nset, nset=m_Set-52, instance=Part-Floor-1
 7,
*Nset, nset=m_Set-54, instance=Part-Floor-1
 9,
*Nset, nset=m_Set-56, instance=Part-Floor-1
 11,
*Nset, nset=m_Set-58, instance=Part-Floor-1
 13,
*Nset, nset=m_Set-60, instance=Part-Floor-1
 15,
*Nset, nset=m_Set-62, instance=Part-Floor-1
 17,
*Nset, nset=m_Set-64, instance=Part-Floor-1
 1,
*Nset, nset=m_Set-66, instance=Part-Floor-1
 4,
*Nset, nset=m_Set-68, instance=Part-Floor-1
 6,
*Nset, nset=m_Set-70, instance=Part-Floor-1
 8,
*Nset, nset=m_Set-72, instance=Part-Floor-1
 10,
*Nset, nset=m_Set-74, instance=Part-Floor-1
 12,
*Nset, nset=m_Set-76, instance=Part-Floor-1
 14,
*Nset, nset=m_Set-78, instance=Part-Floor-1
 16,
*Nset, nset=m_Set-80, instance=Part-Floor-1
 18,
*Nset, nset=m_Set-82, instance=Part-RiverBank-2
 1,
*Nset, nset=m_Set-84, instance=Part-RiverBank-2
 2,
*Nset, nset=m_Set-86, instance=Part-RiverBank-1
 8,
*Nset, nset=m_Set-88, instance=Part-RiverBank-1
 5,
*Nset, nset=m_Set-90, instance=Part-RiverBank-2
  3,  4, 36, 37, 38, 39, 40, 41, 42, 43, 44
*Elset, elset=m_Set-90, instance=Part-RiverBank-2, generate
 141,  150,    1
*Nset, nset=m_Set-92, instance=Part-RiverBank-1
  6,  7, 82, 83, 84, 85, 86, 87, 88, 89, 90
*Elset, elset=m_Set-92, instance=Part-RiverBank-1, generate
 3741,  3750,     1
*Nset, nset=m_Set-94, instance=Part-Pier-2
 8,
*Nset, nset=m_Set-96, instance=Part-Pier-2
 8,
*Nset, nset=m_Set-98, instance=Part-Pier-1
 5,
*Nset, nset=m_Set-100, instance=Part-Pier-1
 5,
*Nset, nset=s_Set-6, instance=Part-Cable200-4
 1,
*Nset, nset=s_Set-8, instance=Part-Cable150-4
 1,
*Nset, nset=s_Set-10, instance=Part-Cable100-4
 1,
*Nset, nset=s_Set-12, instance=Part-Cable250-4
 1,
*Nset, nset=s_Set-13, instance=Part-Cable50-4
 1,
*Nset, nset=s_Set-14, instance=Part-Cable250-3
 1,
*Nset, nset=s_Set-16, instance=Part-Cable200-3
 1,
*Nset, nset=s_Set-18, instance=Part-Cable150-3
 1,
*Nset, nset=s_Set-20, instance=Part-Cable100-3
 1,
*Nset, nset=s_Set-22, instance=Part-Cable50-3
 1,
*Nset, nset=s_Set-24, instance=Part-Cable250-2
 1,
*Nset, nset=s_Set-26, instance=Part-Cable200-2
 1,
*Nset, nset=s_Set-28, instance=Part-Cable150-2
 1,
*Nset, nset=s_Set-30, instance=Part-Cable100-2
 1,
*Nset, nset=s_Set-32, instance=Part-Cable50-2
 1,
*Nset, nset=s_Set-34, instance=Part-Cable250-1
 1,
*Nset, nset=s_Set-36, instance=Part-Cable200-1
 1,
*Nset, nset=s_Set-38, instance=Part-Cable150-1
 1,
*Nset, nset=s_Set-40, instance=Part-Cable100-1
 1,
*Nset, nset=s_Set-42, instance=Part-Cable50-1
 1,
*Nset, nset=s_Set-44, instance=Part-SupportBeam-2
 18,
*Nset, nset=s_Set-46, instance=Part-SupportBeam-2
 18,
*Nset, nset=s_Set-48, instance=Part-SupportBeam-2
 20,
*Nset, nset=s_Set-50, instance=Part-SupportBeam-2
 14,
*Nset, nset=s_Set-52, instance=Part-SupportBeam-2
 16,
*Nset, nset=s_Set-54, instance=Part-SupportBeam-2
 10,
*Nset, nset=s_Set-56, instance=Part-SupportBeam-2
 8,
*Nset, nset=s_Set-58, instance=Part-SupportBeam-2
 6,
*Nset, nset=s_Set-60, instance=Part-SupportBeam-2
 5,
*Nset, nset=s_Set-62, instance=Part-SupportBeam-2
 3,
*Nset, nset=s_Set-64, instance=Part-SupportBeam-1
 18,
*Nset, nset=s_Set-66, instance=Part-SupportBeam-1
 20,
*Nset, nset=s_Set-68, instance=Part-SupportBeam-1
 14,
*Nset, nset=s_Set-70, instance=Part-SupportBeam-1
 16,
*Nset, nset=s_Set-72, instance=Part-SupportBeam-1
 10,
*Nset, nset=s_Set-74, instance=Part-SupportBeam-1
 8,
*Nset, nset=s_Set-76, instance=Part-SupportBeam-1
 6,
*Nset, nset=s_Set-78, instance=Part-SupportBeam-1
 5,
*Nset, nset=s_Set-80, instance=Part-SupportBeam-1
 3,
*Nset, nset=s_Set-82, instance=Part-SupportBeam-2
 19,
*Nset, nset=s_Set-84, instance=Part-SupportBeam-1
 19,
*Nset, nset=s_Set-86, instance=Part-SupportBeam-2
 2,
*Nset, nset=s_Set-88, instance=Part-SupportBeam-1
 2,
*Nset, nset=s_Set-90, instance=Part-Floor-1
  21,  22, 569, 570, 571, 572, 573, 574, 575, 576, 577
*Elset, elset=s_Set-90, instance=Part-Floor-1, generate
 2491,  2500,     1
*Nset, nset=s_Set-92, instance=Part-Floor-1
  19,  20, 512, 513, 514, 515, 516, 517, 518, 519, 520
*Elset, elset=s_Set-92, instance=Part-Floor-1, generate
 2241,  2250,     1
*Nset, nset=s_Set-94, instance=Part-Cable50-3
 2,
*Nset, nset=s_Set-94, instance=Part-Cable100-3
 2,
*Nset, nset=s_Set-94, instance=Part-Cable150-3
 2,
*Nset, nset=s_Set-94, instance=Part-Cable250-3
 2,
*Nset, nset=s_Set-94, instance=Part-Cable200-3
 2,
*Nset, nset=s_Set-96, instance=Part-Cable50-1
 2,
*Nset, nset=s_Set-96, instance=Part-Cable100-1
 2,
*Nset, nset=s_Set-96, instance=Part-Cable200-1
 2,
*Nset, nset=s_Set-96, instance=Part-Cable150-1
 2,
*Nset, nset=s_Set-96, instance=Part-Cable250-1
 2,
*Nset, nset=s_Set-98, instance=Part-Cable50-4
 2,
*Nset, nset=s_Set-98, instance=Part-Cable100-4
 2,
*Nset, nset=s_Set-98, instance=Part-Cable200-4
 2,
*Nset, nset=s_Set-98, instance=Part-Cable150-4
 2,
*Nset, nset=s_Set-98, instance=Part-Cable250-4
 2,
*Nset, nset=s_Set-100, instance=Part-Cable50-2
 2,
*Nset, nset=s_Set-100, instance=Part-Cable100-2
 2,
*Nset, nset=s_Set-100, instance=Part-Cable150-2
 2,
*Nset, nset=s_Set-100, instance=Part-Cable250-2
 2,
*Nset, nset=s_Set-100, instance=Part-Cable200-2
 2,
*Surface, type=NODE, name=m_Set-6_CNS_, internal
m_Set-6, 1.
*Surface, type=NODE, name=s_Set-6_CNS_, internal
s_Set-6, 1.
*Surface, type=NODE, name=m_Set-8_CNS_, internal
m_Set-8, 1.
*Surface, type=NODE, name=s_Set-8_CNS_, internal
s_Set-8, 1.
*Surface, type=NODE, name=m_Set-10_CNS_, internal
m_Set-10, 1.
*Surface, type=NODE, name=s_Set-10_CNS_, internal
s_Set-10, 1.
*Surface, type=NODE, name=m_Set-12_CNS_, internal
m_Set-12, 1.
*Surface, type=NODE, name=s_Set-12_CNS_, internal
s_Set-12, 1.
*Surface, type=NODE, name=m_Set-13_CNS_, internal
m_Set-13, 1.
*Surface, type=NODE, name=s_Set-13_CNS_, internal
s_Set-13, 1.
*Surface, type=NODE, name=m_Set-14_CNS_, internal
m_Set-14, 1.
*Surface, type=NODE, name=s_Set-14_CNS_, internal
s_Set-14, 1.
*Surface, type=NODE, name=m_Set-16_CNS_, internal
m_Set-16, 1.
*Surface, type=NODE, name=s_Set-16_CNS_, internal
s_Set-16, 1.
*Surface, type=NODE, name=m_Set-18_CNS_, internal
m_Set-18, 1.
*Surface, type=NODE, name=s_Set-18_CNS_, internal
s_Set-18, 1.
*Surface, type=NODE, name=m_Set-20_CNS_, internal
m_Set-20, 1.
*Surface, type=NODE, name=s_Set-20_CNS_, internal
s_Set-20, 1.
*Surface, type=NODE, name=m_Set-22_CNS_, internal
m_Set-22, 1.
*Surface, type=NODE, name=s_Set-22_CNS_, internal
s_Set-22, 1.
*Surface, type=NODE, name=m_Set-24_CNS_, internal
m_Set-24, 1.
*Surface, type=NODE, name=s_Set-24_CNS_, internal
s_Set-24, 1.
*Surface, type=NODE, name=m_Set-26_CNS_, internal
m_Set-26, 1.
*Surface, type=NODE, name=s_Set-26_CNS_, internal
s_Set-26, 1.
*Surface, type=NODE, name=m_Set-28_CNS_, internal
m_Set-28, 1.
*Surface, type=NODE, name=s_Set-28_CNS_, internal
s_Set-28, 1.
*Surface, type=NODE, name=m_Set-30_CNS_, internal
m_Set-30, 1.
*Surface, type=NODE, name=s_Set-30_CNS_, internal
s_Set-30, 1.
*Surface, type=NODE, name=m_Set-32_CNS_, internal
m_Set-32, 1.
*Surface, type=NODE, name=s_Set-32_CNS_, internal
s_Set-32, 1.
*Surface, type=NODE, name=m_Set-34_CNS_, internal
m_Set-34, 1.
*Surface, type=NODE, name=s_Set-34_CNS_, internal
s_Set-34, 1.
*Surface, type=NODE, name=m_Set-36_CNS_, internal
m_Set-36, 1.
*Surface, type=NODE, name=s_Set-36_CNS_, internal
s_Set-36, 1.
*Surface, type=NODE, name=m_Set-38_CNS_, internal
m_Set-38, 1.
*Surface, type=NODE, name=s_Set-38_CNS_, internal
s_Set-38, 1.
*Surface, type=NODE, name=m_Set-40_CNS_, internal
m_Set-40, 1.
*Surface, type=NODE, name=s_Set-40_CNS_, internal
s_Set-40, 1.
*Surface, type=NODE, name=m_Set-42_CNS_, internal
m_Set-42, 1.
*Surface, type=NODE, name=s_Set-42_CNS_, internal
s_Set-42, 1.
*Surface, type=NODE, name=m_Set-46_CNS_, internal
m_Set-46, 1.
*Surface, type=NODE, name=s_Set-46_CNS_, internal
s_Set-46, 1.
*Surface, type=NODE, name=m_Set-48_CNS_, internal
m_Set-48, 1.
*Surface, type=NODE, name=s_Set-48_CNS_, internal
s_Set-48, 1.
*Surface, type=NODE, name=m_Set-50_CNS_, internal
m_Set-50, 1.
*Surface, type=NODE, name=s_Set-50_CNS_, internal
s_Set-50, 1.
*Surface, type=NODE, name=m_Set-52_CNS_, internal
m_Set-52, 1.
*Surface, type=NODE, name=s_Set-52_CNS_, internal
s_Set-52, 1.
*Surface, type=NODE, name=m_Set-54_CNS_, internal
m_Set-54, 1.
*Surface, type=NODE, name=s_Set-54_CNS_, internal
s_Set-54, 1.
*Surface, type=NODE, name=m_Set-56_CNS_, internal
m_Set-56, 1.
*Surface, type=NODE, name=s_Set-56_CNS_, internal
s_Set-56, 1.
*Surface, type=NODE, name=m_Set-58_CNS_, internal
m_Set-58, 1.
*Surface, type=NODE, name=s_Set-58_CNS_, internal
s_Set-58, 1.
*Surface, type=NODE, name=m_Set-60_CNS_, internal
m_Set-60, 1.
*Surface, type=NODE, name=s_Set-60_CNS_, internal
s_Set-60, 1.
*Surface, type=NODE, name=m_Set-62_CNS_, internal
m_Set-62, 1.
*Surface, type=NODE, name=s_Set-62_CNS_, internal
s_Set-62, 1.
*Surface, type=NODE, name=m_Set-64_CNS_, internal
m_Set-64, 1.
*Surface, type=NODE, name=s_Set-64_CNS_, internal
s_Set-64, 1.
*Surface, type=NODE, name=m_Set-66_CNS_, internal
m_Set-66, 1.
*Surface, type=NODE, name=s_Set-66_CNS_, internal
s_Set-66, 1.
*Surface, type=NODE, name=m_Set-68_CNS_, internal
m_Set-68, 1.
*Surface, type=NODE, name=s_Set-68_CNS_, internal
s_Set-68, 1.
*Surface, type=NODE, name=m_Set-70_CNS_, internal
m_Set-70, 1.
*Surface, type=NODE, name=s_Set-70_CNS_, internal
s_Set-70, 1.
*Surface, type=NODE, name=m_Set-72_CNS_, internal
m_Set-72, 1.
*Surface, type=NODE, name=s_Set-72_CNS_, internal
s_Set-72, 1.
*Surface, type=NODE, name=m_Set-74_CNS_, internal
m_Set-74, 1.
*Surface, type=NODE, name=s_Set-74_CNS_, internal
s_Set-74, 1.
*Surface, type=NODE, name=m_Set-76_CNS_, internal
m_Set-76, 1.
*Surface, type=NODE, name=s_Set-76_CNS_, internal
s_Set-76, 1.
*Surface, type=NODE, name=m_Set-78_CNS_, internal
m_Set-78, 1.
*Surface, type=NODE, name=s_Set-78_CNS_, internal
s_Set-78, 1.
*Surface, type=NODE, name=m_Set-80_CNS_, internal
m_Set-80, 1.
*Surface, type=NODE, name=s_Set-80_CNS_, internal
s_Set-80, 1.
*Surface, type=NODE, name=m_Set-82_CNS_, internal
m_Set-82, 1.
*Surface, type=NODE, name=s_Set-82_CNS_, internal
s_Set-82, 1.
*Surface, type=NODE, name=m_Set-84_CNS_, internal
m_Set-84, 1.
*Surface, type=NODE, name=s_Set-84_CNS_, internal
s_Set-84, 1.
*Surface, type=NODE, name=m_Set-86_CNS_, internal
m_Set-86, 1.
*Surface, type=NODE, name=s_Set-86_CNS_, internal
s_Set-86, 1.
*Surface, type=NODE, name=m_Set-88_CNS_, internal
m_Set-88, 1.
*Surface, type=NODE, name=s_Set-88_CNS_, internal
s_Set-88, 1.
*Surface, type=NODE, name=m_Set-90_CNS_, internal
m_Set-90, 1.
*Surface, type=NODE, name=s_Set-90_CNS_, internal
s_Set-90, 1.
*Surface, type=NODE, name=m_Set-92_CNS_, internal
m_Set-92, 1.
*Surface, type=NODE, name=s_Set-92_CNS_, internal
s_Set-92, 1.
*Surface, type=NODE, name=m_Set-94_CNS_, internal
m_Set-94, 1.
*Surface, type=NODE, name=s_Set-94_CNS_, internal
s_Set-94, 1.
*Surface, type=NODE, name=m_Set-96_CNS_, internal
m_Set-96, 1.
*Surface, type=NODE, name=s_Set-96_CNS_, internal
s_Set-96, 1.
*Surface, type=NODE, name=m_Set-98_CNS_, internal
m_Set-98, 1.
*Surface, type=NODE, name=s_Set-98_CNS_, internal
s_Set-98, 1.
*Surface, type=NODE, name=m_Set-100_CNS_, internal
m_Set-100, 1.
*Surface, type=NODE, name=s_Set-100_CNS_, internal
s_Set-100, 1.
** Constraint: Constraint-2
*Tie, name=Constraint-2, adjust=yes, no rotation
s_Set-6_CNS_, m_Set-6_CNS_
** Constraint: Constraint-3
*Tie, name=Constraint-3, adjust=yes, no rotation
s_Set-8_CNS_, m_Set-8_CNS_
** Constraint: Constraint-4
*Tie, name=Constraint-4, adjust=yes, no rotation
s_Set-10_CNS_, m_Set-10_CNS_
** Constraint: Constraint-5
*Tie, name=Constraint-5, adjust=yes, no rotation
s_Set-12_CNS_, m_Set-12_CNS_
** Constraint: Constraint-6
*Tie, name=Constraint-6, adjust=yes, no rotation
s_Set-13_CNS_, m_Set-13_CNS_
** Constraint: Constraint-7
*Tie, name=Constraint-7, adjust=yes
s_Set-14_CNS_, m_Set-14_CNS_
** Constraint: Constraint-8
*Tie, name=Constraint-8, adjust=yes
s_Set-16_CNS_, m_Set-16_CNS_
** Constraint: Constraint-9
*Tie, name=Constraint-9, adjust=no
s_Set-18_CNS_, m_Set-18_CNS_
** Constraint: Constraint-10
*Tie, name=Constraint-10, adjust=yes, no rotation
s_Set-20_CNS_, m_Set-20_CNS_
** Constraint: Constraint-11
*Tie, name=Constraint-11, adjust=yes, no rotation
s_Set-22_CNS_, m_Set-22_CNS_
** Constraint: Constraint-12
*Tie, name=Constraint-12, adjust=yes, no rotation
s_Set-24_CNS_, m_Set-24_CNS_
** Constraint: Constraint-13
*Tie, name=Constraint-13, adjust=yes, no rotation
s_Set-26_CNS_, m_Set-26_CNS_
** Constraint: Constraint-14
*Tie, name=Constraint-14, adjust=yes, no rotation
s_Set-28_CNS_, m_Set-28_CNS_
** Constraint: Constraint-15
*Tie, name=Constraint-15, adjust=yes, no rotation
s_Set-30_CNS_, m_Set-30_CNS_
** Constraint: Constraint-16
*Tie, name=Constraint-16, adjust=yes, no rotation
s_Set-32_CNS_, m_Set-32_CNS_
** Constraint: Constraint-17
*Tie, name=Constraint-17, adjust=yes, no rotation
s_Set-34_CNS_, m_Set-34_CNS_
** Constraint: Constraint-18
*Tie, name=Constraint-18, adjust=yes, no rotation
s_Set-36_CNS_, m_Set-36_CNS_
** Constraint: Constraint-19
*Tie, name=Constraint-19, adjust=yes, no rotation
s_Set-38_CNS_, m_Set-38_CNS_
** Constraint: Constraint-20
*Tie, name=Constraint-20, adjust=yes, no rotation
s_Set-40_CNS_, m_Set-40_CNS_
** Constraint: Constraint-21
*Tie, name=Constraint-21, adjust=yes, no rotation
s_Set-42_CNS_, m_Set-42_CNS_
** Constraint: Constraint-22
*Tie, name=Constraint-22, adjust=yes, no rotation
s_Set-46_CNS_, m_Set-46_CNS_
** Constraint: Constraint-23
*Tie, name=Constraint-23, adjust=yes, no rotation
s_Set-48_CNS_, m_Set-48_CNS_
** Constraint: Constraint-24
*Tie, name=Constraint-24, adjust=yes, no rotation
s_Set-50_CNS_, m_Set-50_CNS_
** Constraint: Constraint-25
*Tie, name=Constraint-25, adjust=yes, no rotation
s_Set-52_CNS_, m_Set-52_CNS_
** Constraint: Constraint-26
*Tie, name=Constraint-26, adjust=yes, no rotation
s_Set-54_CNS_, m_Set-54_CNS_
** Constraint: Constraint-27
*Tie, name=Constraint-27, adjust=yes, no rotation
s_Set-56_CNS_, m_Set-56_CNS_
** Constraint: Constraint-28
*Tie, name=Constraint-28, adjust=yes, no rotation
s_Set-58_CNS_, m_Set-58_CNS_
** Constraint: Constraint-29
*Tie, name=Constraint-29, adjust=yes, no rotation
s_Set-60_CNS_, m_Set-60_CNS_
** Constraint: Constraint-30
*Tie, name=Constraint-30, adjust=yes, no rotation
s_Set-62_CNS_, m_Set-62_CNS_
** Constraint: Constraint-31
*Tie, name=Constraint-31, adjust=yes, no rotation
s_Set-64_CNS_, m_Set-64_CNS_
** Constraint: Constraint-32
*Tie, name=Constraint-32, adjust=yes, no rotation
s_Set-66_CNS_, m_Set-66_CNS_
** Constraint: Constraint-33
*Tie, name=Constraint-33, adjust=yes, no rotation
s_Set-68_CNS_, m_Set-68_CNS_
** Constraint: Constraint-34
*Tie, name=Constraint-34, adjust=yes, no rotation
s_Set-70_CNS_, m_Set-70_CNS_
** Constraint: Constraint-35
*Tie, name=Constraint-35, adjust=yes, no rotation
s_Set-72_CNS_, m_Set-72_CNS_
** Constraint: Constraint-36
*Tie, name=Constraint-36, adjust=yes, no rotation
s_Set-74_CNS_, m_Set-74_CNS_
** Constraint: Constraint-37
*Tie, name=Constraint-37, adjust=yes, no rotation
s_Set-76_CNS_, m_Set-76_CNS_
** Constraint: Constraint-38
*Tie, name=Constraint-38, adjust=yes, no rotation
s_Set-78_CNS_, m_Set-78_CNS_
** Constraint: Constraint-39
*Tie, name=Constraint-39, adjust=yes, no rotation
s_Set-80_CNS_, m_Set-80_CNS_
** Constraint: Constraint-40
*Tie, name=Constraint-40, adjust=yes, no rotation
s_Set-82_CNS_, m_Set-82_CNS_
** Constraint: Constraint-41
*Tie, name=Constraint-41, adjust=yes, no rotation
s_Set-84_CNS_, m_Set-84_CNS_
** Constraint: Constraint-42
*Tie, name=Constraint-42, adjust=yes, no rotation
s_Set-86_CNS_, m_Set-86_CNS_
** Constraint: Constraint-43
*Tie, name=Constraint-43, adjust=yes, no rotation
s_Set-88_CNS_, m_Set-88_CNS_
** Constraint: Constraint-44
*Tie, name=Constraint-44, adjust=yes, no rotation
s_Set-90_CNS_, m_Set-90_CNS_
** Constraint: Constraint-45
*Tie, name=Constraint-45, adjust=yes, no rotation
s_Set-92_CNS_, m_Set-92_CNS_
** Constraint: Constraint-46
*Tie, name=Constraint-46, adjust=yes, no rotation
s_Set-94_CNS_, m_Set-94_CNS_
** Constraint: Constraint-47
*Tie, name=Constraint-47, adjust=yes, no rotation
s_Set-96_CNS_, m_Set-96_CNS_
** Constraint: Constraint-48
*Tie, name=Constraint-48, adjust=yes, no rotation
s_Set-98_CNS_, m_Set-98_CNS_
** Constraint: Constraint-49
*Tie, name=Constraint-49, adjust=yes, no rotation
s_Set-100_CNS_, m_Set-100_CNS_
*End Assembly
**
** MATERIALS
**
** For the SupportBeam
*Material, name=Aluminum
*Density
2710.,
*Elastic
 7e+10, 0.346
** For the Pier and the Floor
*Material, name=Concrete
*Density
2320.,
*Elastic
 2.5e+10, 0.3
** For the RiverBank
*Material, name=Granite
*Density
2770.,
*Elastic
 6e+10, 0.27
** For the Cable
*Material, name=Steel
*Density
7860.,
*Elastic
 1.17e+11, 0.266
** ----------------------------------------------------------------
**
** STEP: Step-1
**
*Step, name=Step-1, nlgeom=NO
*Static
1., 1., 1e-05, 1.
**
** BOUNDARY CONDITIONS
**
** Name: BC-1 Type: Displacement/Rotation
*Boundary
Set-102, 1, 1
Set-102, 2, 2
Set-102, 3, 3
**
** LOADS
**
** Name: Load-1   Type: Gravity
*Dload
, GRAV, 10., 0., 0., -1.
**
** OUTPUT REQUESTS
**
*Restart, write, frequency=0
**
** FIELD OUTPUT: F-Output-1
**
*Output, field, variable=PRESELECT
**
** HISTORY OUTPUT: H-Output-1
**
*Output, history, variable=PRESELECT
*End Step
